# This configuration file creates the SAME EQUILIBRIUM POSITIONS multiple times. This is for debugging.
log log.lammps

units           metal
atom_style      atomic
atom_modify     map array

lattice         diamond 5.43
region          simbox block 0 ${S} 0 ${S} 0 ${S}
create_box      1 simbox
create_atoms    1 region simbox

mass 1 28.0855

group Si type 1

pair_style sw
pair_coeff * * ../../si.sw Si

dump 1 all yaml 1 dump.si-${T}-${S}.yaml id type x y z fx fy fz


thermo_style yaml
thermo 1

#==========================Output files========================

run ${STEP}
